<?xml version="1.0" encoding="UTF-8"?>
<neuroml xmlns="http://www.neuroml.org/schema/neuroml2"
    xmlns:xsi="http://www.w3.org/2001/XMLSchema-instance"
    xmlns:xi="http://www.w3.org/2001/XInclude"
      xsi:schemaLocation="http://www.neuroml.org/schema/neuroml2 ../Schemas/NeuroML2/NeuroML_v2alpha.xsd"
    id="NML2_FullCell">
    <!--<include href="SimpleIonChannel.xml"/> Contains ionChannel NaConductance -->
    <cell id="Basket">
        <notes>A model of a basket cell (adapted from Basket1.hoc)</notes>
        <morphology id="BasketMorph">
            <!-- Segments-->
            <segment id="soma">
                <proximal x="0" y="0" z="0" diameter="35"/>
                <distal x="35" y="0" z="0" diameter="35"/>
            </segment>
        </morphology>
        <biophysicalProperties id="BasketBiophys">
            <membraneProperties>
                <intFire id="COBA_IF"/>
                <passiveCurrent condDensity="3.0" units="S_per_m2"/>
                <specificCapacitance value="1.0" units="uF_per_cm2"/>
                <reversalPotential species="ca" value="129.33" units="mV"/>
               <!-- Not inserted need to check <reversalPotential species="cl" value="-65 mV"/>  -->
            </membraneProperties>
            <intracellularProperties>
                <resistivity value="100" units="ohm_cm"/>  <!-- Used for specific axial resistance -->
            </intracellularProperties>
        </biophysicalProperties>
    </cell>
</neuroml>
