<?xml version="1.0" encoding="UTF-8"?>
<neuroml xmlns="http://www.neuroml.org/schema/neuroml2"
    xmlns:xsi="http://www.w3.org/2001/XMLSchema-instance" xmlns:xi="http://www.w3.org/2001/XInclude"
    xsi:schemaLocation="http://www.neuroml.org/schema/neuroml2 ../Schemas/NeuroML2/NeuroML_v2alpha.xsd"
    id="NML2_FullCell">
    <!--<include href="SimpleIonChannel.xml"/> Contains ionChannel NaConductance -->
    <cell id="Stellate">
        <notes>A model of a stellate cell</notes>
        <morphology id="StellateMorph">
            <!-- Segments -->
            <segment id="soma">
                <proximal x="0" y="0" z="0" diameter="9.76" />
                <distal x="9.76" y="0" z="0" diameter="9.76" />
            </segment>
        </morphology>
        <biophysicalProperties id="StellateBiophys">
            <membraneProperties>
                <ionicCurrent id="StellateCurrent" />
                <passiveCurrent condDensity="3.0" units="S_per_m2" />
                <specificCapacitance value="1.0"
                    units="uF_per_cm2" />
                <reversalPotential species="ca" value="129.33"
                    units="mV" />
                <!-- Not inserted need to check <reversalPotential species="cl"
                    value="-65 mV"/> -->
            </membraneProperties>
            <intracellularProperties>
                <resistivity value="100" units="ohm_cm" />  <!-- Used for specific axial resistance -->
            </intracellularProperties>
        </biophysicalProperties>
    </cell>
</neuroml>
